*Heading
** Job name: Job-1 Model name: Job-1
** Generated by: Abaqus/CAE 2021
*Preprint, echo=NO, model=NO, history=NO, contact=NO
**
** PARTS
**
*Part, name=PART-1
*Node
      1,           5.,          45.,    2.0999999
      2,           5.,          44.,    2.0999999
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*Element, type=C3D8
  1, 139, 140, 186, 185,   1,   2,  48,  47
  2, 140, 141, 187, 186,   2,   3,  49,  48
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*Nset, nset=_PICKEDSET2, internal, generate
   1,  828,    1
*Elset, elset=_PICKEDSET2, internal, generate
   1,  450,    1
** Section: Section-1-_PICKEDSET2
*Solid Section, elset=_PICKEDSET2, material=MATERIAL-1
,
*End Part
**
**
** ASSEMBLY
**
*Assembly, name=Assembly
**
*Instance, name=PART-1-1, part=PART-1
          0.,          -2.,           2.
          0.,          -2.,           2., -1.00000001268805,          -2.,           2., 89.9999992730282
*End Instance
**
*Nset, nset=SET-1, instance=PART-1-1, generate
  46,  828,   46
*Elset, elset=SET-1, instance=PART-1-1, generate
  45,  450,   45
*Nset, nset=_PICKEDSET10, internal, instance=PART-1-1, generate
  46,  828,   46
*Nset, nset=_PICKEDSET12, internal, instance=PART-1-1, generate
 691,  783,   46
*Nset, nset=_PICKEDSET13, internal, instance=PART-1-1, generate
  93,  783,  138
*Nset, nset=_PICKEDSET14, internal, instance=PART-1-1, generate
   1,  783,   46
*Nset, nset=_PickedSet11, internal, instance=PART-1-1, generate
  46,  828,   46
*End Assembly
**
** MATERIALS
**
*Material, name=MATERIAL-1
*Depvar
     24,
*User Material, constants=300
-90.,  35.2644,      45.,       1.,       2.,       1.,       2.,      12.
       6.,       0.,     0.25,  170000.,  124000.,   75000.,       0.,       0.
       0.,       0.,       0.,       0.,       1.,       0.,       0.,       0.
       3.,    0.001,      20.,       0.,       0.,       0.,       0.,       0.
       0.,       0.,       0.,       0.,       0.,       0.,       0.,       0.
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       0.,       0.,       0.,       0.
**
** BOUNDARY CONDITIONS
**
** Name: BC-5 Type: Displacement/Rotation
*Boundary
_PickedSet11, 1, 1
_PickedSet11, 2, 2
** Name: Disp-BC-3 Type: Symmetry/Antisymmetry/Encastre
*Boundary
_PICKEDSET14, ENCASTRE
** ----------------------------------------------------------------
**
** STEP: Step-1
**
*Step, name=Step-1, nlgeom=YES, inc=10000
*Static
0.1, 66.7, 1e-05, 5.
**
** BOUNDARY CONDITIONS
**
** Name: Disp-BC-4 Type: Displacement/Rotation
*Boundary
_PICKEDSET10, 3, 3, 9.
**
** OUTPUT REQUESTS
**
*Restart, write, frequency=0
**
** FIELD OUTPUT: F-Output-1
**
*Output, field
*Contact Output
CDISP, CSTRESS
**
** FIELD OUTPUT: F-Output-2
**
*Node Output
CF, RF, U
**
** FIELD OUTPUT: F-Output-3
**
*Element Output, directions=YES
LE, PE, PEEQ, PEMAG, S, SDV
**
** HISTORY OUTPUT: H-Output-1
**
*Output, history
*Node Output, nset=SET-1
RF3, U3
*End Step
