*HEADING
Generated automatically by ciGEN
which is written by Phu Nguyen at Monash Univiersity.
*NODE, INPUT= Square20umEl0p25-node.inp
*ELEMENT, INPUT= Square20umEl0p25-bulk-elems.inp, TYPE=CPS3
*USER ELEMENT, TYPE=U1, NODE=4, COORDINATES=2, PROPERTIES=9, VARIABLES=4
1, 2
*ELEMENT, INPUT= Square20umEl0p25-int-elems.inp, TYPE=U1
*ELSET, ELSET=1
1,
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*NSET, NSET=2
1
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*NSET, NSET=3
3
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*NSET, NSET=4
1
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*NSET, NSET=5
2
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*NSET, NSET=6
1
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*NSET, NSET=7
5
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*SOLID SECTION, ELSET= , MATERIAL=
*MATERIAL, NAME=
*UEL PROPERTY, ELSET=

*BOUNDARY

****************************************
** HISTORY DATA
*STEP, NLGEOM=NO, INC=
*STATIC, RIKS

*BOUNDARY

*END STEP
