*Heading
** Job name: Job-1 Model name: Model-1
** Generated by: Abaqus/CAE 2017
*Preprint, echo=NO, model=NO, history=NO, contact=NO
**
** PARTS
**
*Part, name=Part-1
*Node
      1,   5007.55713,   27181.4141,           0.
      2,   6770.98877,   25055.8281,           0.
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*Element, type=C3D8
 1,  387, 1841, 1842,  388,  418, 1872, 1873,  417
 2, 1859,  393,  392, 1853, 1890,  412,  413, 1884
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*Nset, nset=GRAIN1
    1,    2,    3,    4,    5,    6
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*Elset, elset=GRAIN1, generate
  1,  41,   1
*Nset, nset=GRAIN2
   11,   12,   13,   14,   15,   16
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*Elset, elset=GRAIN2, generate
 42,  91,   1
*Nset, nset=GRAIN3
   25,   26,   27,   28,   29,   30
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*Elset, elset=GRAIN3, generate
  92,  102,    1
*Nset, nset=GRAIN4
   25,   26,   31,   32,   37,   38
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*Elset, elset=GRAIN4, generate
 103,  138,    1
*Nset, nset=GRAIN5
   47,   48,   49,   50,   51,   52
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*Elset, elset=GRAIN5, generate
 139,  147,    1
*Nset, nset=GRAIN6
    2,    3,    6,   10,   11,   17
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*Elset, elset=GRAIN6, generate
 148,  237,    1
*Nset, nset=GRAIN7
   57,   58,   63,   64,   65,   66
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*Elset, elset=GRAIN7, generate
 238,  246,    1
*Nset, nset=GRAIN8
   69,   70,   71,   72,   73,   74
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*Elset, elset=GRAIN8, generate
 247,  325,    1
*Nset, nset=GRAIN9
   69,   70,   75,   76,   81,   82
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*Elset, elset=GRAIN9, generate
 326,  345,    1
*Nset, nset=GRAIN10
   47,   48,   52,   53,   89,   90
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*Elset, elset=GRAIN10, generate
 346,  355,    1
*Nset, nset=GRAIN11
   83,   84,   85,   86,   97,   98
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*Elset, elset=GRAIN11, generate
 356,  364,    1
*Nset, nset=GRAIN12
   73,   74,   77,   78,  101,  102
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*Elset, elset=GRAIN12, generate
 365,  396,    1
*Nset, nset=GRAIN13
   28,   29,   34,   35,  109,  110
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*Elset, elset=GRAIN13, generate
 397,  424,    1
*Nset, nset=GRAIN14
   27,   28,   35,   36,  111,  112
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*Elset, elset=GRAIN14, generate
 425,  452,    1
*Nset, nset=GRAIN15
   59,   60,   61,   62,  119,  120
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*Elset, elset=GRAIN15, generate
 453,  478,    1
*Nset, nset=GRAIN16
    1,    2,    6,    7,   11,   12
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*Elset, elset=GRAIN16, generate
 479,  496,    1
*Nset, nset=GRAIN17
  129,  130,  131,  132,  133,  134
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*Elset, elset=GRAIN17, generate
 497,  549,    1
*Nset, nset=GRAIN18
  101,  102,  107,  108,  143,  144
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*Elset, elset=GRAIN18, generate
 550,  563,    1
*Nset, nset=GRAIN19
   39,   40,   43,   44,  149,  150
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*Elset, elset=GRAIN19, generate
 564,  663,    1
*Nset, nset=GRAIN20
    1,    5,    7,    8,  127,  128
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*Elset, elset=GRAIN20, generate
 664,  697,    1
*Nset, nset=GRAIN21
  103,  104,  105,  106,  159,  160
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*Elset, elset=GRAIN21, generate
 698,  713,    1
*Nset, nset=GRAIN22
   72,   73,   78,   79,  104,  105
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*Elset, elset=GRAIN22, generate
 714,  726,    1
*Nset, nset=GRAIN23
  159,  160,  162,  163,  165,  166
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*Elset, elset=GRAIN23, generate
 727,  749,    1
*Nset, nset=GRAIN24
    3,    4,    9,   10,   60,   61
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*Elset, elset=GRAIN24, generate
 750,  796,    1
*Nset, nset=GRAIN25
   47,   51,   53,   54,   89,   96
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*Elset, elset=GRAIN25, generate
 797,  844,    1
*Nset, nset=GRAIN26
   50,   51,   54,   55,  173,  180
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*Elset, elset=GRAIN26, generate
 845,  923,    1
*Nset, nset=GRAIN27
   13,   14,   23,   24,   38,   39
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*Elset, elset=GRAIN27, generate
 924,  937,    1
*Nset, nset=GRAIN28
   15,   16,   21,   22,  189,  190
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*Elset, elset=GRAIN28, generate
 938,  950,    1
*Nset, nset=GRAIN29
  190,  191,  192,  193,  195,  196
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*Elset, elset=GRAIN29, generate
 951,  964,    1
*Nset, nset=GRAIN30
  102,  103,  106,  107,  145,  146
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*Elset, elset=GRAIN30, generate
  965,  1006,     1
*Nset, nset=GRAIN31
  119,  120,  125,  126,  207,  208
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*Elset, elset=GRAIN31, generate
 1007,  1015,     1
*Nset, nset=GRAIN32
   40,   41,   42,   43,  149,  158
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*Elset, elset=GRAIN32, generate
 1016,  1026,     1
*Nset, nset=GRAIN33
  132,  133,  140,  141,  215,  216
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*Elset, elset=GRAIN33, generate
 1027,  1100,     1
*Nset, nset=GRAIN34
  217,  218,  219,  220,  223,  224
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*Elset, elset=GRAIN34, generate
 1101,  1110,     1
*Nset, nset=GRAIN35
  129,  130,  136,  137,  229,  230
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*Elset, elset=GRAIN35, generate
 1111,  1139,     1
*Nset, nset=GRAIN36
   58,   59,   62,   63,   65,   68
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*Elset, elset=GRAIN36, generate
 1140,  1173,     1
*Nset, nset=GRAIN37
  109,  110,  113,  114,  183,  184
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*Elset, elset=GRAIN37, generate
 1174,  1235,     1
*Nset, nset=GRAIN38
  181,  182,  187,  188,  245,  246
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*Elset, elset=GRAIN38, generate
 1236,  1266,     1
*Nset, nset=GRAIN39
  143,  144,  147,  148,  229,  230
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*Elset, elset=GRAIN39, generate
 1267,  1300,     1
*Nset, nset=GRAIN40
  131,  132,  141,  142,  215,  222
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*Elset, elset=GRAIN40, generate
 1301,  1331,     1
*Nset, nset=GRAIN41
  165,  166,  169,  170,  203,  206
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*Elset, elset=GRAIN41, generate
 1332,  1345,     1
*Nset, nset=GRAIN42
   48,   49,   52,   56,   92,   93
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*Elset, elset=GRAIN42, generate
 1346,  1367,     1
*Nset, nset=GRAIN43
  265,  266,  268,  269,  271,  272
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*Elset, elset=GRAIN43, generate
 1368,  1511,     1
*Nset, nset=GRAIN44
  121,  122,  123,  124,  171,  172
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*Elset, elset=GRAIN44, generate
 1512,  1551,     1
*Nset, nset=GRAIN45
   12,   13,   18,   24,  127,  128
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*Elset, elset=GRAIN45, generate
 1552,  1563,     1
*Nset, nset=GRAIN46
  130,  131,  136,  142,  232,  233
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*Elset, elset=GRAIN46, generate
 1564,  1575,     1
*Nset, nset=GRAIN47
   25,   30,   32,   33,   37,   46
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*Elset, elset=GRAIN47, generate
 1576,  1588,     1
*Nset, nset=GRAIN48
  287,  288,  289,  290,  291,  292
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*Elset, elset=GRAIN48, generate
 1589,  1602,     1
*Nset, nset=GRAIN49
  290,  291,  296,  297,  299,  300
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*Elset, elset=GRAIN49, generate
 1603,  1617,     1
*Nset, nset=GRAIN50
  266,  267,  268,  270,  274,  275
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*Elset, elset=GRAIN50, generate
 1618,  1659,     1
*Nset, nset=GRAIN51
   65,   66,   67,   68,  238,  239
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*Elset, elset=GRAIN51, generate
 1660,  1669,     1
*Nset, nset=GRAIN52
  173,  174,  179,  180,  181,  188
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*Elset, elset=GRAIN52, generate
 1670,  1691,     1
*Nset, nset=GRAIN53
   82,   83,   86,   87,   98,   99
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*Elset, elset=GRAIN53, generate
 1692,  1711,     1
*Nset, nset=GRAIN54
  144,  145,  146,  147,  204,  205
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*Elset, elset=GRAIN54, generate
 1712,  1759,     1
*Nset, nset=GRAIN55
  115,  116,  117,  118,  149,  150
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*Elset, elset=GRAIN55, generate
 1760,  1879,     1
*Nset, nset=GRAIN56
  207,  208,  211,  212,  323,  324
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*Elset, elset=GRAIN56, generate
 1880,  1896,     1
*Nset, nset=GRAIN57
  189,  190,  193,  194,  195,  202
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*Elset, elset=GRAIN57, generate
 1897,  1912,     1
*Nset, nset=GRAIN58
   91,   92,   93,   94,  265,  269
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*Elset, elset=GRAIN58, generate
 1913,  1916,     1
*Nset, nset=GRAIN59
   70,   71,   75,   80,   84,   85
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*Elset, elset=GRAIN59, generate
 1917,  1963,     1
*Nset, nset=GRAIN60
  253,  254,  255,  256,  319,  320
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*Elset, elset=GRAIN60, generate
 1964,  1996,     1
*Nset, nset=GRAIN61
  261,  262,  263,  264,  323,  324
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*Elset, elset=GRAIN61, generate
 1997,  2029,     1
*Nset, nset=GRAIN62
  299,  300,  307,  308,  335,  336
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*Elset, elset=GRAIN62, generate
 2030,  2034,     1
*Nset, nset=GRAIN63
  134,  135,  138,  139,  351,  352
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*Elset, elset=GRAIN63, generate
 2035,  2048,     1
*Nset, nset=GRAIN64
  175,  176,  177,  178,  352,  353
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*Elset, elset=GRAIN64, generate
 2049,  2090,     1
*Nset, nset=GRAIN65
  129,  135,  137,  138,  229,  236
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*Elset, elset=GRAIN65, generate
 2091,  2111,     1
*Nset, nset=GRAIN66
   81,   82,   87,   88,  231,  232
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*Elset, elset=GRAIN66, generate
 2112,  2128,     1
*Nset, nset=GRAIN67
   69,   74,   76,   77,   81,   88
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*Elset, elset=GRAIN67, generate
 2129,  2191,     1
*Nset, nset=GRAIN68
  208,  209,  210,  211,  237,  240
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*Elset, elset=GRAIN68, generate
 2192,  2204,     1
*Nset, nset=GRAIN69
  195,  196,  201,  202,  311,  312
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*Elset, elset=GRAIN69, generate
 2205,  2225,     1
*Nset, nset=GRAIN70
  133,  134,  139,  140,  218,  219
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*Elset, elset=GRAIN70, generate
 2226,  2251,     1
*Nset, nset=GRAIN71
  271,  272,  277,  278,  331,  332
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*Elset, elset=GRAIN71, generate
 2252,  2300,     1
*Nset, nset=GRAIN72
  324,  325,  328,  329,  345,  346
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*Elset, elset=GRAIN72, generate
 2301,  2338,     1
*Nset, nset=GRAIN73
   49,   50,   55,   56,  184,  185
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*Elset, elset=GRAIN73, generate
 2339,  2428,     1
*Nset, nset=GRAIN74
  289,  290,  297,  298,  299,  308
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*Elset, elset=GRAIN74, generate
 2429,  2437,     1
*Nset, nset=GRAIN75
  237,  238,  239,  240,  287,  292
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*Elset, elset=GRAIN75, generate
 2438,  2458,     1
*Nset, nset=GRAIN76
  325,  326,  327,  328,  371,  374
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*Elset, elset=GRAIN76, generate
 2459,  2530,     1
*Nset, nset=GRAIN77
  375,  376,  379,  380,  381,  382
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*Elset, elset=GRAIN77, generate
 2531,  2546,     1
*Nset, nset=GRAIN78
  197,  198,  199,  200,  301,  302
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*Elset, elset=GRAIN78, generate
 2547,  2557,     1
*Nset, nset=GRAIN79
   90,   91,   94,   95,  223,  224
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*Elset, elset=GRAIN79, generate
 2558,  2569,     1
*Nset, nset=GRAIN80
  196,  197,  200,  201,  300,  301
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*Elset, elset=GRAIN80, generate
 2570,  2579,     1
*Nset, nset=GRAIN81
   16,   17,   20,   21,   57,   64
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*Elset, elset=GRAIN81, generate
 2580,  2617,     1
*Nset, nset=GRAIN82
  174,  175,  178,  179,  311,  314
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*Elset, elset=GRAIN82, generate
 2618,  2631,     1
*Nset, nset=GRAIN83
  120,  121,  124,  125,  207,  212
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*Elset, elset=GRAIN83, generate
 2632,  2652,     1
*Nset, nset=GRAIN84
  257,  258,  259,  260,  283,  284
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*Elset, elset=GRAIN84, generate
 2653,  2668,     1
*Nset, nset=GRAIN85
  182,  183,  186,  187,  242,  243
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*Elset, elset=GRAIN85, generate
 2669,  2680,     1
*Nset, nset=GRAIN86
  336,  337,  340,  341,  349,  350
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*Elset, elset=GRAIN86, generate
 2681,  2712,     1
*Nset, nset=GRAIN87
  216,  217,  220,  221,  223,  228
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*Elset, elset=GRAIN87, generate
 2713,  2747,     1
*Nset, nset=GRAIN88
   89,   90,   95,   96,  176,  177
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*Elset, elset=GRAIN88, generate
 2748,  2766,     1
*Nset, nset=GRAIN89
  279,  280,  281,  282,  376,  377
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*Elset, elset=GRAIN89, generate
 2767,  2807,     1
*Nset, nset=GRAIN90
  337,  338,  339,  340,  351,  352
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*Elset, elset=GRAIN90, generate
 2808,  2812,     1
*Nset, nset=GRAIN91
   14,   15,   22,   23,   37,   38
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*Elset, elset=GRAIN91, generate
 2813,  2866,     1
*Nset, nset=GRAIN92
   29,   30,   33,   34,  109,  114
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*Elset, elset=GRAIN92, generate
 2867,  2874,     1
*Nset, nset=GRAIN93
   26,   27,   31,   36,   41,   42
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*Elset, elset=GRAIN93, generate
 2875,  2879,     1
*Nset, nset=GRAIN94
  166,  167,  168,  169,  262,  264
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*Elset, elset=GRAIN94, generate
 2880,  2906,     1
*Nset, nset=GRAIN95
  203,  204,  205,  206,  261,  263
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*Elset, elset=GRAIN95, generate
 2907,  2940,     1
** Section: GRAIN1
*Solid Section, elset=GRAIN1, material=GRAIN1
,
** Section: GRAIN2
*Solid Section, elset=GRAIN2, material=GRAIN2
,
** Section: GRAIN3
*Solid Section, elset=GRAIN3, material=GRAIN3
,
** Section: GRAIN4
*Solid Section, elset=GRAIN4, material=GRAIN4
,
** Section: GRAIN5
*Solid Section, elset=GRAIN5, material=GRAIN5
,
** Section: GRAIN6
*Solid Section, elset=GRAIN6, material=GRAIN6
,
** Section: GRAIN7
*Solid Section, elset=GRAIN7, material=GRAIN7
,
** Section: GRAIN8
*Solid Section, elset=GRAIN8, material=GRAIN8
,
** Section: GRAIN9
*Solid Section, elset=GRAIN9, material=GRAIN9
,
** Section: GRAIN10
*Solid Section, elset=GRAIN10, material=GRAIN10
,
** Section: GRAIN11
*Solid Section, elset=GRAIN11, material=GRAIN11
,
** Section: GRAIN12
*Solid Section, elset=GRAIN12, material=GRAIN12
,
** Section: GRAIN13
*Solid Section, elset=GRAIN13, material=GRAIN13
,
** Section: GRAIN14
*Solid Section, elset=GRAIN14, material=GRAIN14
,
** Section: GRAIN15
*Solid Section, elset=GRAIN15, material=GRAIN15
,
** Section: GRAIN16
*Solid Section, elset=GRAIN16, material=GRAIN16
,
** Section: GRAIN17
*Solid Section, elset=GRAIN17, material=GRAIN17
,
** Section: GRAIN18
*Solid Section, elset=GRAIN18, material=GRAIN18
,
** Section: GRAIN19
*Solid Section, elset=GRAIN19, material=GRAIN19
,
** Section: GRAIN20
*Solid Section, elset=GRAIN20, material=GRAIN20
,
** Section: GRAIN21
*Solid Section, elset=GRAIN21, material=GRAIN21
,
** Section: GRAIN22
*Solid Section, elset=GRAIN22, material=GRAIN22
,
** Section: GRAIN23
*Solid Section, elset=GRAIN23, material=GRAIN23
,
** Section: GRAIN24
*Solid Section, elset=GRAIN24, material=GRAIN24
,
** Section: GRAIN25
*Solid Section, elset=GRAIN25, material=GRAIN25
,
** Section: GRAIN26
*Solid Section, elset=GRAIN26, material=GRAIN26
,
** Section: GRAIN27
*Solid Section, elset=GRAIN27, material=GRAIN27
,
** Section: GRAIN28
*Solid Section, elset=GRAIN28, material=GRAIN28
,
** Section: GRAIN29
*Solid Section, elset=GRAIN29, material=GRAIN29
,
** Section: GRAIN30
*Solid Section, elset=GRAIN30, material=GRAIN30
,
** Section: GRAIN31
*Solid Section, elset=GRAIN31, material=GRAIN31
,
** Section: GRAIN32
*Solid Section, elset=GRAIN32, material=GRAIN32
,
** Section: GRAIN33
*Solid Section, elset=GRAIN33, material=GRAIN33
,
** Section: GRAIN34
*Solid Section, elset=GRAIN34, material=GRAIN34
,
** Section: GRAIN35
*Solid Section, elset=GRAIN35, material=GRAIN35
,
** Section: GRAIN36
*Solid Section, elset=GRAIN36, material=GRAIN36
,
** Section: GRAIN37
*Solid Section, elset=GRAIN37, material=GRAIN37
,
** Section: GRAIN38
*Solid Section, elset=GRAIN38, material=GRAIN38
,
** Section: GRAIN39
*Solid Section, elset=GRAIN39, material=GRAIN39
,
** Section: GRAIN40
*Solid Section, elset=GRAIN40, material=GRAIN40
,
** Section: GRAIN41
*Solid Section, elset=GRAIN41, material=GRAIN41
,
** Section: GRAIN42
*Solid Section, elset=GRAIN42, material=GRAIN42
,
** Section: GRAIN43
*Solid Section, elset=GRAIN43, material=GRAIN43
,
** Section: GRAIN44
*Solid Section, elset=GRAIN44, material=GRAIN44
,
** Section: GRAIN45
*Solid Section, elset=GRAIN45, material=GRAIN45
,
** Section: GRAIN46
*Solid Section, elset=GRAIN46, material=GRAIN46
,
** Section: GRAIN47
*Solid Section, elset=GRAIN47, material=GRAIN47
,
** Section: GRAIN48
*Solid Section, elset=GRAIN48, material=GRAIN48
,
** Section: GRAIN49
*Solid Section, elset=GRAIN49, material=GRAIN49
,
** Section: GRAIN50
*Solid Section, elset=GRAIN50, material=GRAIN50
,
** Section: GRAIN51
*Solid Section, elset=GRAIN51, material=GRAIN51
,
** Section: GRAIN52
*Solid Section, elset=GRAIN52, material=GRAIN52
,
** Section: GRAIN53
*Solid Section, elset=GRAIN53, material=GRAIN53
,
** Section: GRAIN54
*Solid Section, elset=GRAIN54, material=GRAIN54
,
** Section: GRAIN55
*Solid Section, elset=GRAIN55, material=GRAIN55
,
** Section: GRAIN56
*Solid Section, elset=GRAIN56, material=GRAIN56
,
** Section: GRAIN57
*Solid Section, elset=GRAIN57, material=GRAIN57
,
** Section: GRAIN58
*Solid Section, elset=GRAIN58, material=GRAIN58
,
** Section: GRAIN59
*Solid Section, elset=GRAIN59, material=GRAIN59
,
** Section: GRAIN60
*Solid Section, elset=GRAIN60, material=GRAIN60
,
** Section: GRAIN61
*Solid Section, elset=GRAIN61, material=GRAIN61
,
** Section: GRAIN62
*Solid Section, elset=GRAIN62, material=GRAIN62
,
** Section: GRAIN63
*Solid Section, elset=GRAIN63, material=GRAIN63
,
** Section: GRAIN64
*Solid Section, elset=GRAIN64, material=GRAIN64
,
** Section: GRAIN65
*Solid Section, elset=GRAIN65, material=GRAIN65
,
** Section: GRAIN66
*Solid Section, elset=GRAIN66, material=GRAIN66
,
** Section: GRAIN67
*Solid Section, elset=GRAIN67, material=GRAIN67
,
** Section: GRAIN68
*Solid Section, elset=GRAIN68, material=GRAIN68
,
** Section: GRAIN69
*Solid Section, elset=GRAIN69, material=GRAIN69
,
** Section: GRAIN70
*Solid Section, elset=GRAIN70, material=GRAIN70
,
** Section: GRAIN71
*Solid Section, elset=GRAIN71, material=GRAIN71
,
** Section: GRAIN72
*Solid Section, elset=GRAIN72, material=GRAIN72
,
** Section: GRAIN73
*Solid Section, elset=GRAIN73, material=GRAIN73
,
** Section: GRAIN74
*Solid Section, elset=GRAIN74, material=GRAIN74
,
** Section: GRAIN75
*Solid Section, elset=GRAIN75, material=GRAIN75
,
** Section: GRAIN76
*Solid Section, elset=GRAIN76, material=GRAIN76
,
** Section: GRAIN77
*Solid Section, elset=GRAIN77, material=GRAIN77
,
** Section: GRAIN78
*Solid Section, elset=GRAIN78, material=GRAIN78
,
** Section: GRAIN79
*Solid Section, elset=GRAIN79, material=GRAIN79
,
** Section: GRAIN80
*Solid Section, elset=GRAIN80, material=GRAIN80
,
** Section: GRAIN81
*Solid Section, elset=GRAIN81, material=GRAIN81
,
** Section: GRAIN82
*Solid Section, elset=GRAIN82, material=GRAIN82
,
** Section: GRAIN83
*Solid Section, elset=GRAIN83, material=GRAIN83
,
** Section: GRAIN84
*Solid Section, elset=GRAIN84, material=GRAIN84
,
** Section: GRAIN85
*Solid Section, elset=GRAIN85, material=GRAIN85
,
** Section: GRAIN86
*Solid Section, elset=GRAIN86, material=GRAIN86
,
** Section: GRAIN87
*Solid Section, elset=GRAIN87, material=GRAIN87
,
** Section: GRAIN88
*Solid Section, elset=GRAIN88, material=GRAIN88
,
** Section: GRAIN89
*Solid Section, elset=GRAIN89, material=GRAIN89
,
** Section: GRAIN90
*Solid Section, elset=GRAIN90, material=GRAIN90
,
** Section: GRAIN91
*Solid Section, elset=GRAIN91, material=GRAIN91
,
** Section: GRAIN92
*Solid Section, elset=GRAIN92, material=GRAIN92
,
** Section: GRAIN93
*Solid Section, elset=GRAIN93, material=GRAIN93
,
** Section: GRAIN94
*Solid Section, elset=GRAIN94, material=GRAIN94
,
** Section: GRAIN95
*Solid Section, elset=GRAIN95, material=GRAIN95
,
*End Part
**
**
** ASSEMBLY
**
*Assembly, name=Assembly
**
*Instance, name=Part-1-1, part=Part-1
*End Instance
**
*End Assembly
**
** MATERIALS
**
*Material, name=GRAIN1
*Depvar
    125,
*User Material, constants=11
5., -0.0696571,   0.835262,   0.545422,   0.474003,   0.508799,  -0.718641,  -0.877764
   0.208473,  -0.431358,         1.
*Material, name=GRAIN2
*Depvar
    125,
*User Material, constants=11
5., -0.582291,  0.470811,  0.662778, -0.482762, -0.856189,  0.184066,  0.654124
 -0.212784,   0.72584,        2.
*Material, name=GRAIN3
*Depvar
    125,
*User Material, constants=11
5., 0.0533523,  0.252585, -0.966103,  -0.94661,  0.320828, 0.0316038,  0.317935
  0.912836,  0.256217,        3.
*Material, name=GRAIN4
*Depvar
    125,
*User Material, constants=11
5.,   0.10871,  0.352958,  0.929302, -0.529839, -0.770413,  0.354591,  0.841102
 -0.530929,  0.103259,        4.
*Material, name=GRAIN5
*Depvar
    125,
*User Material, constants=11
5., -0.800827,  0.515459,  0.304922,   0.59203,  0.604485,  0.533009, 0.0904233
  0.607371, -0.789256,        5.
*Material, name=GRAIN6
*Depvar
    125,
*User Material, constants=11
5.,   0.757643,  -0.649843, -0.0606752,  -0.422024,  -0.416864,  -0.805059,   0.497869
   0.635554,  -0.590083,         6.
*Material, name=GRAIN7
*Depvar
    125,
*User Material, constants=11
5., -0.732132,  0.173787, -0.658621,   0.48628,  0.810426, -0.326712,  0.476985
  -0.55947, -0.677848,        7.
*Material, name=GRAIN8
*Depvar
    125,
*User Material, constants=11
5.,   0.692224,  -0.551381,  -0.465624, -0.0144894,   -0.65568,     0.7549,  -0.721537
  -0.515813,  -0.461866,         8.
*Material, name=GRAIN9
*Depvar
    125,
*User Material, constants=11
5.,  0.904745,  0.368603,  0.213468, 0.0807735, -0.640526,  0.763677,  0.418225
  -0.67369, -0.609286,        9.
*Material, name=GRAIN10
*Depvar
    125,
*User Material, constants=11
5.,  -0.208363,  -0.944844,  -0.252695,  -0.383946,   0.316644,  -0.867365,   0.899539
 -0.0837053,  -0.428746,        10.
*Material, name=GRAIN11
*Depvar
    125,
*User Material, constants=11
5.,  -0.354108,   0.237306,  -0.904596,  -0.934743,  -0.120209,   0.334374, -0.0293919
   0.963969,   0.264387,        11.
*Material, name=GRAIN12
*Depvar
    125,
*User Material, constants=11
5.,  0.721313, -0.659533,  -0.21148,  -0.66471, -0.744987, 0.0561714, -0.194596
  0.100055, -0.975767,       12.
*Material, name=GRAIN13
*Depvar
    125,
*User Material, constants=11
5., -0.566348,  0.528155, -0.632695,  0.748042,  0.651654, -0.125618,  0.345952
 -0.544426, -0.764145,       13.
*Material, name=GRAIN14
*Depvar
    125,
*User Material, constants=11
5., -0.283782, -0.745289,  0.603334,  0.437105,  0.459482,  0.773186, -0.853468
  0.483136,  0.195377,       14.
*Material, name=GRAIN15
*Depvar
    125,
*User Material, constants=11
5., -0.414099, -0.802928,  0.428752, -0.729129,  0.574574,    0.3718, -0.544878
 -0.158654, -0.823369,       15.
*Material, name=GRAIN16
*Depvar
    125,
*User Material, constants=11
5.,  0.407395,  0.284604, -0.867773, -0.204517,    0.9545,  0.217033,  0.890057
 0.0890557,  0.447065,       16.
*Material, name=GRAIN17
*Depvar
    125,
*User Material, constants=11
5.,   0.229006,  -0.169591,  -0.958538,   0.354997,   0.931439, -0.0799838,   0.906385
  -0.321962,    0.27351,        17.
*Material, name=GRAIN18
*Depvar
    125,
*User Material, constants=11
5.,  0.200094, -0.711024, -0.674097, -0.678922, -0.596676,  0.427836, -0.706419
  0.372052, -0.602121,       18.
*Material, name=GRAIN19
*Depvar
    125,
*User Material, constants=11
5., -0.847269, -0.120544, -0.517305, 0.0823155,  -0.99194, 0.0963247, -0.524747
 0.0390307,  0.850363,       19.
*Material, name=GRAIN20
*Depvar
    125,
*User Material, constants=11
5.,   0.967165, -0.0020396,  -0.254142,  0.0450426,  -0.982762,   0.179302,  -0.250127
  -0.184862,  -0.950401,        20.
*Material, name=GRAIN21
*Depvar
    125,
*User Material, constants=11
5., -0.599529, -0.796111, 0.0822997, -0.551535,  0.336438, -0.763294,  0.579978
 -0.503008, -0.640787,       21.
*Material, name=GRAIN22
*Depvar
    125,
*User Material, constants=11
5.,  0.996834, 0.0121792, 0.0785732, 0.0302948, -0.971836, -0.233703,  0.073514
  0.235343, -0.969128,       22.
*Material, name=GRAIN23
*Depvar
    125,
*User Material, constants=11
5.,  -0.428595,   0.287174,   0.856643,   0.532367,   0.846336, -0.0173655,  -0.729995
   0.448605,  -0.515617,        23.
*Material, name=GRAIN24
*Depvar
    125,
*User Material, constants=11
5.,  0.734413, -0.416061,  0.536219, 0.0481705,  0.820025,  0.570297, -0.676991
 -0.393003,  0.622279,       24.
*Material, name=GRAIN25
*Depvar
    125,
*User Material, constants=11
5.,  -0.992003,  0.0608496,    0.11058,   0.107202, -0.0562314,   0.992646,  0.0666202
   0.996562,  0.0492585,        25.
*Material, name=GRAIN26
*Depvar
    125,
*User Material, constants=11
5.,   -0.803752,    0.368538,   -0.467078,   -0.504048, -0.00469935,    0.863663,    0.316098
    0.929601,    0.189538,         26.
*Material, name=GRAIN27
*Depvar
    125,
*User Material, constants=11
5.,   0.717929,   0.689676, -0.0944753,  -0.452205,   0.565241,   0.689937,   0.529234
  -0.452603,   0.717678,        27.
*Material, name=GRAIN28
*Depvar
    125,
*User Material, constants=11
5.,  0.936963,  0.348073, 0.0307354, -0.257337,  0.627851,  0.734562,  0.236384
 -0.696167,  0.677845,       28.
*Material, name=GRAIN29
*Depvar
    125,
*User Material, constants=11
5.,  0.113409,  0.680173,  0.724226, -0.487603,   0.67321, -0.555906, -0.865668
  -0.29009,  0.408003,       29.
*Material, name=GRAIN30
*Depvar
    125,
*User Material, constants=11
5., -0.0927472,  -0.298821,   0.949792,  -0.631845,   0.754895,   0.175803,  -0.769526
  -0.583815,  -0.258823,        30.
*Material, name=GRAIN31
*Depvar
    125,
*User Material, constants=11
5.,  0.445685,  0.105423,   0.88896,  0.824344, -0.435514, -0.361641,   0.34903
  0.893987, -0.281007,       31.
*Material, name=GRAIN32
*Depvar
    125,
*User Material, constants=11
5.,   0.388109, -0.0307128,   0.921102,   0.823784,  -0.436556,   -0.36166,    0.41322
   0.899153,  -0.144131,        32.
*Material, name=GRAIN33
*Depvar
    125,
*User Material, constants=11
5., -0.138184,  0.947282,  -0.28907, -0.344287, -0.319611, -0.882788,  -0.92864
 -0.022464,  0.370302,       33.
*Material, name=GRAIN34
*Depvar
    125,
*User Material, constants=11
5.,  -0.623676,  -0.775698, -0.0965439,   0.451763,  -0.256892,  -0.854352,   0.637918
  -0.576453,   0.510649,        34.
*Material, name=GRAIN35
*Depvar
    125,
*User Material, constants=11
5., -0.164267,  0.676037, -0.718325,  0.833618,  0.484454,  0.265302,   0.52735
 -0.555228, -0.643136,       35.
*Material, name=GRAIN36
*Depvar
    125,
*User Material, constants=11
5., 0.00928742,  -0.845655,  -0.533649,  -0.321822,  -0.507806,   0.799102,  -0.946755
   0.164318,  -0.276867,        36.
*Material, name=GRAIN37
*Depvar
    125,
*User Material, constants=11
5., -0.876092, -0.441897, -0.192844, -0.251701,  0.760326, -0.598791,  0.411228
 -0.476058, -0.777342,       37.
*Material, name=GRAIN38
*Depvar
    125,
*User Material, constants=11
5.,   0.643844,  -0.762432,  0.0645222, -0.0100858, -0.0927746,  -0.995636,    0.76509
   0.640383, -0.0674221,        38.
*Material, name=GRAIN39
*Depvar
    125,
*User Material, constants=11
5.,  -0.733001,   0.458795,  -0.502211,  -0.329369,  -0.885364,  -0.328094,  -0.595168
 -0.0750809,   0.800086,        39.
*Material, name=GRAIN40
*Depvar
    125,
*User Material, constants=11
5., -0.775233,  0.365341, -0.515306, 0.0274595,  0.834496,   0.55033,  0.631079
  0.412483,  -0.65696,       40.
*Material, name=GRAIN41
*Depvar
    125,
*User Material, constants=11
5., -0.0833158,   0.375257,  -0.923169,  -0.202604,   -0.91342,  -0.353009,   -0.97571
   0.157627,   0.152131,        41.
*Material, name=GRAIN42
*Depvar
    125,
*User Material, constants=11
5.,  0.0849239,  -0.988268,   0.126945,  -0.837065,  -0.139872,  -0.528921,   0.540472
 -0.0613436,  -0.839123,        42.
*Material, name=GRAIN43
*Depvar
    125,
*User Material, constants=11
5., -0.115294, -0.713336, -0.691274, -0.447455, -0.584015,  0.677282, -0.886843
    0.3874, -0.251853,       43.
*Material, name=GRAIN44
*Depvar
    125,
*User Material, constants=11
5.,   0.165257,   -0.26823,   0.949075,   0.985597, 0.00987453,  -0.168825,  0.0359124
   0.963304,   0.265998,        44.
*Material, name=GRAIN45
*Depvar
    125,
*User Material, constants=11
5.,  -0.462487,   0.246631,   0.851633, -0.0746667,  -0.967954,   0.239769,   0.883477
  0.0473015,   0.466081,        45.
*Material, name=GRAIN46
*Depvar
    125,
*User Material, constants=11
5., -0.436275,  0.843686,  0.312823, -0.783702, -0.527097,  0.328604,  0.442126
 -0.101798,  0.891157,       46.
*Material, name=GRAIN47
*Depvar
    125,
*User Material, constants=11
5.,   0.928103,  -0.319575,    0.19104,  -0.192104,  0.0285081,    0.98096,  -0.318937
  -0.947132, -0.0349331,        47.
*Material, name=GRAIN48
*Depvar
    125,
*User Material, constants=11
5.,  -0.969066,  -0.242643,  0.0451118,  -0.246081,    0.96391,  -0.101594, -0.0188326
  -0.109552,  -0.993803,        48.
*Material, name=GRAIN49
*Depvar
    125,
*User Material, constants=11
5.,  -0.791621,   0.139386,  -0.594902,  -0.150492,  -0.988117, -0.0312597,  -0.592189
  0.0647822,   0.803191,        49.
*Material, name=GRAIN50
*Depvar
    125,
*User Material, constants=11
5., -0.423987, -0.175459,  -0.88851, -0.572679, -0.708083,  0.413106, -0.701622
  0.683983,  0.199736,       50.
*Material, name=GRAIN51
*Depvar
    125,
*User Material, constants=11
5.,   0.873376,   0.399915,   0.277997,   0.485177,  -0.664418,  -0.568464, -0.0426309
   0.631361,  -0.774316,        51.
*Material, name=GRAIN52
*Depvar
    125,
*User Material, constants=11
5.,   0.690987,   0.389927,   0.608683,   0.530161,  -0.845768, -0.0600422,   0.491392
   0.364188,  -0.791139,        52.
*Material, name=GRAIN53
*Depvar
    125,
*User Material, constants=11
5.,  0.877908, -0.305164, -0.368988, -0.415371, -0.101988, -0.903917,   0.23821
  0.946823, -0.216293,       53.
*Material, name=GRAIN54
*Depvar
    125,
*User Material, constants=11
5.,   0.757285, -0.0294332,  -0.652421,  -0.511625,  -0.647627,  -0.564642,  -0.405906
   0.761389,  -0.505497,        54.
*Material, name=GRAIN55
*Depvar
    125,
*User Material, constants=11
5., -0.967005, -0.174552,  0.185561,  0.234386, -0.894989,  0.379549, 0.0998244
  0.410519,  0.906372,       55.
*Material, name=GRAIN56
*Depvar
    125,
*User Material, constants=11
5.,  0.525815,  0.371035,  0.765409, -0.671012, -0.372073,   0.64133,  0.522744
  -0.85082, 0.0533276,       56.
*Material, name=GRAIN57
*Depvar
    125,
*User Material, constants=11
5.,    0.218035,    0.284583,   -0.933527, -0.00433883,   -0.956249,   -0.292523,   -0.975931
   0.0678308,   -0.207261,         57.
*Material, name=GRAIN58
*Depvar
    125,
*User Material, constants=11
5., -0.339358,  -0.71292, -0.613662, -0.155052,  0.685847, -0.711036,   0.92779
 -0.146146, -0.343288,       58.
*Material, name=GRAIN59
*Depvar
    125,
*User Material, constants=11
5.,  -0.322289,  -0.383834,  -0.865333,   0.942938,  -0.210947,  -0.257623, -0.0836552
  -0.898985,   0.429917,        59.
*Material, name=GRAIN60
*Depvar
    125,
*User Material, constants=11
5., -0.887213, -0.339204,  0.312719, -0.276276,  0.933469,  0.228707, -0.369492
  0.116516,   -0.9219,       60.
*Material, name=GRAIN61
*Depvar
    125,
*User Material, constants=11
5.,   -0.124088,   -0.800878,     0.58583, -0.00825913,    0.591206,    0.806478,   -0.992237
   0.0952358,  -0.0799762,         61.
*Material, name=GRAIN62
*Depvar
    125,
*User Material, constants=11
5., -0.694417, -0.645996,  0.316978,  0.144364,   0.30648,  0.940866, -0.704943
  0.699113, -0.119566,       62.
*Material, name=GRAIN63
*Depvar
    125,
*User Material, constants=11
5., 0.00269786,  -0.997562, -0.0697362,   0.721834, -0.0463193,   0.690514,   -0.69206
 -0.0522009,    0.71995,        63.
*Material, name=GRAIN64
*Depvar
    125,
*User Material, constants=11
5., -0.946385, -0.283054,  0.155681, 0.0840101, -0.680991, -0.727457,  0.311927
 -0.675375,  0.668259,       64.
*Material, name=GRAIN65
*Depvar
    125,
*User Material, constants=11
5., -0.197093,  0.909722,  -0.36546, 0.0360646,  0.379247,  0.924592,  0.979721
  0.169051, -0.107556,       65.
*Material, name=GRAIN66
*Depvar
    125,
*User Material, constants=11
5., 0.00094082,   0.999384,  0.0350919,  -0.934832, -0.0115818,   0.354902,    0.35509
 -0.0331389,   0.934245,        66.
*Material, name=GRAIN67
*Depvar
    125,
*User Material, constants=11
5.,  -0.602567, -0.0165228,  -0.797897,  -0.583974,   0.690572,   0.426714,   0.543955
   0.723075,  -0.425765,        67.
*Material, name=GRAIN68
*Depvar
    125,
*User Material, constants=11
5.,  0.615411, -0.781595,  0.101877, -0.720663, -0.610305, -0.328897,   0.31924
  0.128988, -0.938854,       68.
*Material, name=GRAIN69
*Depvar
    125,
*User Material, constants=11
5.,  -0.179711,   0.435886,   0.881877,  -0.118687,  -0.899531,   0.420425,   0.976533
 -0.0291123,   0.213389,        69.
*Material, name=GRAIN70
*Depvar
    125,
*User Material, constants=11
5.,  0.807951,  0.486144,  0.332986,  0.178638, -0.740587,   0.64778,  0.561519
 -0.463891, -0.685202,       70.
*Material, name=GRAIN71
*Depvar
    125,
*User Material, constants=11
5.,   0.017782,  -0.480607,   0.876756,   -0.22458,   0.852567,   0.471903,  -0.974293
  -0.205293, -0.0927746,        71.
*Material, name=GRAIN72
*Depvar
    125,
*User Material, constants=11
5.,  0.540324,  0.744533,  0.392071,  0.658308, -0.083816, -0.748068,   -0.5241
  0.662303,  -0.53542,       72.
*Material, name=GRAIN73
*Depvar
    125,
*User Material, constants=11
5.,   0.85486,  0.195218,  0.480733,  0.335013, -0.915176, -0.224097,  0.396208
  0.352623, -0.847748,       73.
*Material, name=GRAIN74
*Depvar
    125,
*User Material, constants=11
5.,  0.442903,  -0.88874,  0.118227,  0.663103,  0.235959, -0.710364,  0.603433
  0.393019,  0.693834,       74.
*Material, name=GRAIN75
*Depvar
    125,
*User Material, constants=11
5.,  0.560866, -0.754294, -0.341278, -0.490443, 0.0293959, -0.870977,  0.667005
  0.655879, -0.353451,       75.
*Material, name=GRAIN76
*Depvar
    125,
*User Material, constants=11
5.,  0.241093, -0.928469,  0.282525, -0.265893,   0.21678,  0.939312, -0.933367
 -0.301583, -0.194609,       76.
*Material, name=GRAIN77
*Depvar
    125,
*User Material, constants=11
5.,  0.443617,  0.889048, -0.113124,  0.612687, -0.392968, -0.685704, -0.654078
  0.234881, -0.719036,       77.
*Material, name=GRAIN78
*Depvar
    125,
*User Material, constants=11
5.,   0.397044,  -0.867809,   -0.29877,   0.771004,   0.491971,  -0.404372,   0.497904
 -0.0697996,   0.864418,        78.
*Material, name=GRAIN79
*Depvar
    125,
*User Material, constants=11
5., -0.281808, -0.947501,  0.151083, -0.212761,  0.215256,  0.953099, -0.935584
  0.236446, -0.262252,       79.
*Material, name=GRAIN80
*Depvar
    125,
*User Material, constants=11
5.,     0.181051,    -0.738905,     -0.64903, -0.000662791,     0.659845,    -0.751402,     0.983473
     0.136473,     0.118976,          80.
*Material, name=GRAIN81
*Depvar
    125,
*User Material, constants=11
5.,    -0.3401,  -0.939981, -0.0277028,  -0.223484,  0.0521749,    0.97331,  -0.913448
   0.337214,  -0.227815,        81.
*Material, name=GRAIN82
*Depvar
    125,
*User Material, constants=11
5., -0.128754, -0.462609, -0.877163,  0.736218,  0.548007,  -0.39708,  0.664384
 -0.696909,  0.270023,       82.
*Material, name=GRAIN83
*Depvar
    125,
*User Material, constants=11
5.,   0.426299,   0.442245,   0.789106,  -0.874866, -0.0201891,   0.483943,   0.229953
  -0.896667,   0.378299,        83.
*Material, name=GRAIN84
*Depvar
    125,
*User Material, constants=11
5.,    0.71352,   0.525392,  -0.463522,   0.462432,  -0.850153,  -0.251788,  -0.526352
 -0.0346918,  -0.849559,        84.
*Material, name=GRAIN85
*Depvar
    125,
*User Material, constants=11
5., 0.0186135,  0.993289,   0.11415,  0.985895, -0.037227,  0.163174,  0.166328
  0.109502, -0.979971,       85.
*Material, name=GRAIN86
*Depvar
    125,
*User Material, constants=11
5.,  0.765049,  0.527402,  0.369523, -0.376152,  0.831735,  -0.40832, -0.522695
  0.173388,  0.834702,       86.
*Material, name=GRAIN87
*Depvar
    125,
*User Material, constants=11
5.,  0.0735385,   0.929334,  -0.361844,  -0.139881,   0.368851,   0.918903,   0.987434
 -0.0169597,   0.157121,        87.
*Material, name=GRAIN88
*Depvar
    125,
*User Material, constants=11
5., -0.418098, 0.0644517,  0.906113,  0.892962,  0.212285,   0.39693, -0.166771
   0.97508, -0.146309,       88.
*Material, name=GRAIN89
*Depvar
    125,
*User Material, constants=11
5.,  -0.934986,  -0.198877,   0.293681,   0.266247,   0.153514,   0.951602,  -0.234336
   0.967926, -0.0905831,        89.
*Material, name=GRAIN90
*Depvar
    125,
*User Material, constants=11
5.,   0.446646,  -0.145617,   0.882782,  -0.894579, -0.0557201,   0.443423, -0.0153814
  -0.987771,  -0.155153,        90.
*Material, name=GRAIN91
*Depvar
    125,
*User Material, constants=11
5.,    0.80052,   0.597169, -0.0505587,   0.519133,  -0.733111,  -0.439374,  -0.299446
   0.325481,   -0.89688,        91.
*Material, name=GRAIN92
*Depvar
    125,
*User Material, constants=11
5.,  0.520644,  0.817605,  0.245871, -0.415466,  0.494208,  -0.76364, -0.745867
  0.295434,  0.596993,       92.
*Material, name=GRAIN93
*Depvar
    125,
*User Material, constants=11
5.,  0.491012, -0.855619,  0.163777, -0.801074, -0.369586,  0.470836, -0.342327
 -0.362383, -0.866886,       93.
*Material, name=GRAIN94
*Depvar
    125,
*User Material, constants=11
5.,  0.664083,  0.716965, -0.212028,  0.243023, -0.475184,  -0.84566,  -0.70706
   0.51006,   -0.4898,       94.
*Material, name=GRAIN95
*Depvar
    125,
*User Material, constants=11
5.,  -0.45606, -0.385634,  0.802057, -0.207963, -0.830107, -0.517372,  0.865309
 -0.402751,  0.298381,       95.
** ----------------------------------------------------------------
**
** STEP: Tension
**
*Step, name=Tension, nlgeom=YES, inc=100000
*Static
0.1, 400., 1e-06, 0.1
**
** OUTPUT REQUESTS
**
*Restart, write, frequency=0
**
** FIELD OUTPUT: F-Output-1
**
*Output, field, variable=PRESELECT
**
** HISTORY OUTPUT: H-Output-1
**
*Output, history, variable=PRESELECT
*End Step
