** Generated by Neper and modified by: Neper2Abaqus.m
**PARTS
**
*Part, name=NEPER
*NODE
1,	0.000000e+00,	1.000000e+00, 	0.000000e+00
2,	0.000000e+00,	1.000000e+00, 	4.386705e-01
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*Element, type=C3D4
       2607,       3,       158,       375,       406
       2608,       422,       404,       365,       16
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*Elset, elset=GRAIN-1
2607, 2608, 2609, 2610, 2611, 2612
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*Elset, elset=GRAIN-2
3068, 3069, 3070, 3071, 3072, 3073
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*Elset, elset=GRAIN-3
3243, 3244, 3245, 3246, 3247, 3248
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*Elset, elset=GRAIN-4
3345, 3346, 3347, 3348, 3349, 3350
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*Elset, elset=GRAIN-5
3403, 3404, 3405, 3406, 3407, 3408
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*Elset, elset=GRAIN-6
3454, 3455, 3456, 3457, 3458, 3459
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*Elset, elset=GRAIN-7
3511, 3512, 3513, 3514, 3515, 3516
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*Elset, elset=GRAIN-8
3649, 3650, 3651, 3652, 3653, 3654
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*Elset, elset=GRAIN-9
3749, 3750, 3751, 3752, 3753, 3754
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*Elset, elset=GRAIN-10
3869, 3870, 3871, 3872, 3873, 3874
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*Elset, elset=GRAIN-11
4002, 4003, 4004, 4005, 4006, 4007
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*Elset, elset=GRAIN-12
4230, 4231, 4232, 4233, 4234, 4235
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*Elset, elset=GRAIN-13
4305, 4306, 4307, 4308, 4309, 4310
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*Elset, elset=GRAIN-14
4358, 4359, 4360, 4361, 4362, 4363
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*Elset, elset=GRAIN-15
4447, 4448, 4449, 4450, 4451, 4452
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*Elset, elset=GRAIN-16
4473, 4474, 4475, 4476, 4477, 4478
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*Elset, elset=GRAIN-17
4540, 4541, 4542, 4543, 4544, 4545
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*Elset, elset=GRAIN-18
4800, 4801, 4802, 4803, 4804, 4805
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*Elset, elset=GRAIN-19
4931, 4932, 4933, 4934, 4935, 4936
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*Elset, elset=GRAIN-20
5248, 5249, 5250, 5251, 5252, 5253
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*Elset, elset=GRAIN-21
5571, 5572, 5573, 5574, 5575, 5576
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*Elset, elset=GRAIN-22
5711, 5712, 5713, 5714, 5715, 5716
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*Elset, elset=GRAIN-23
5771, 5772, 5773, 5774, 5775, 5776
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*Elset, elset=GRAIN-24
5849, 5850, 5851, 5852, 5853, 5854
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*Elset, elset=GRAIN-25
5879, 5880, 5881, 5882, 5883, 5884
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*Elset, elset=GRAIN-26
6005, 6006, 6007, 6008, 6009, 6010
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*Elset, elset=GRAIN-27
6116, 6117, 6118, 6119, 6120, 6121
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*Elset, elset=GRAIN-28
6238, 6239, 6240, 6241, 6242, 6243
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*Elset, elset=GRAIN-29
6324, 6325, 6326, 6327, 6328, 6329
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*Elset, elset=GRAIN-30
6423, 6424, 6425, 6426, 6427, 6428
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
*Elset, elset=Phase-1
2607, 2608, 2609, 2610, 2611, 2612
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
**Section: Section_Grain-1
*Solid Section, elset=GRAIN-1, material=MATERIAL-GRAIN1
,

**Section: Section_Grain-2
*Solid Section, elset=GRAIN-2, material=MATERIAL-GRAIN2
,

**Section: Section_Grain-3
*Solid Section, elset=GRAIN-3, material=MATERIAL-GRAIN3
,

**Section: Section_Grain-4
*Solid Section, elset=GRAIN-4, material=MATERIAL-GRAIN4
,

**Section: Section_Grain-5
*Solid Section, elset=GRAIN-5, material=MATERIAL-GRAIN5
,

**Section: Section_Grain-6
*Solid Section, elset=GRAIN-6, material=MATERIAL-GRAIN6
,

**Section: Section_Grain-7
*Solid Section, elset=GRAIN-7, material=MATERIAL-GRAIN7
,

**Section: Section_Grain-8
*Solid Section, elset=GRAIN-8, material=MATERIAL-GRAIN8
,

**Section: Section_Grain-9
*Solid Section, elset=GRAIN-9, material=MATERIAL-GRAIN9
,

**Section: Section_Grain-10
*Solid Section, elset=GRAIN-10, material=MATERIAL-GRAIN10
,

**Section: Section_Grain-11
*Solid Section, elset=GRAIN-11, material=MATERIAL-GRAIN11
,

**Section: Section_Grain-12
*Solid Section, elset=GRAIN-12, material=MATERIAL-GRAIN12
,

**Section: Section_Grain-13
*Solid Section, elset=GRAIN-13, material=MATERIAL-GRAIN13
,

**Section: Section_Grain-14
*Solid Section, elset=GRAIN-14, material=MATERIAL-GRAIN14
,

**Section: Section_Grain-15
*Solid Section, elset=GRAIN-15, material=MATERIAL-GRAIN15
,

**Section: Section_Grain-16
*Solid Section, elset=GRAIN-16, material=MATERIAL-GRAIN16
,

**Section: Section_Grain-17
*Solid Section, elset=GRAIN-17, material=MATERIAL-GRAIN17
,

**Section: Section_Grain-18
*Solid Section, elset=GRAIN-18, material=MATERIAL-GRAIN18
,

**Section: Section_Grain-19
*Solid Section, elset=GRAIN-19, material=MATERIAL-GRAIN19
,

**Section: Section_Grain-20
*Solid Section, elset=GRAIN-20, material=MATERIAL-GRAIN20
,

**Section: Section_Grain-21
*Solid Section, elset=GRAIN-21, material=MATERIAL-GRAIN21
,

**Section: Section_Grain-22
*Solid Section, elset=GRAIN-22, material=MATERIAL-GRAIN22
,

**Section: Section_Grain-23
*Solid Section, elset=GRAIN-23, material=MATERIAL-GRAIN23
,

**Section: Section_Grain-24
*Solid Section, elset=GRAIN-24, material=MATERIAL-GRAIN24
,

**Section: Section_Grain-25
*Solid Section, elset=GRAIN-25, material=MATERIAL-GRAIN25
,

**Section: Section_Grain-26
*Solid Section, elset=GRAIN-26, material=MATERIAL-GRAIN26
,

**Section: Section_Grain-27
*Solid Section, elset=GRAIN-27, material=MATERIAL-GRAIN27
,

**Section: Section_Grain-28
*Solid Section, elset=GRAIN-28, material=MATERIAL-GRAIN28
,

**Section: Section_Grain-29
*Solid Section, elset=GRAIN-29, material=MATERIAL-GRAIN29
,

**Section: Section_Grain-30
*Solid Section, elset=GRAIN-30, material=MATERIAL-GRAIN30
,
*End Part
**
**ASSEMBLY
**
*Assembly, name=Assembly
**
*Instance, name=NEPER-1, part=NEPER
*NODE
1,	0.000000e+00,	1.000000e+00,	0.000000e+00
2,	0.000000e+00,	1.000000e+00,	4.386705e-01
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*Element, type=C3D4
2607,3,158,375,406
2608,422,404,365,16
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
*End Instance
**
*End Assembly
**MATERIALS
**

*Material, name=MATERIAL-GRAIN1
*Depvar
12,
*User Material, constants=250
108.825664965425,114.8204719716,-200.618088948319,1,2,1,12.0,6.0
0.0,0.31,0.25,170000.0,124000.0,75000.0,0.0,0.0
0.0,0.0,0.0,0.0,1.0,0.0,0.0,0.0
3.0,0.001,20.0,0.0,0.0,0.0,0.0,0.0
0.0,0.0,0.0,0.0,0.0,0.0,0.0,0.0
0.0,0.0,0.0,0.0,0.0,0.0,0.0,0.0
0.0,0.0,0.0,0.0,0.0,0.0,0.0,0.0
0.0,0.0,0.0,0.0,0.0,0.0,0.0,0.0
0.0,0.0,0.0,0.0,0.0,0.0,0.0,0.0
0.0,0.0,0.0,0.0,0.0,0.0,0.0,0.0
0.0,0.0,0.0,0.0,0.0,0.0,0.0,0.0
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0.0,0.0

*Material, name=MATERIAL-GRAIN2
*Depvar
12,
*User Material, constants=250
-80.505367812744,82.07415835438,17.342189738989,2,2,1,12.0,6.0
0.0,0.31,0.25,170000.0,124000.0,75000.0,0.0,0.0
0.0,0.0,0.0,0.0,1.0,0.0,0.0,0.0
3.0,0.001,20.0,0.0,0.0,0.0,0.0,0.0
0.0,0.0,0.0,0.0,0.0,0.0,0.0,0.0
0.0,0.0,0.0,0.0,0.0,0.0,0.0,0.0
0.0,0.0,0.0,0.0,0.0,0.0,0.0,0.0
0.0,0.0,0.0,0.0,0.0,0.0,0.0,0.0
0.0,0.0,0.0,0.0,0.0,0.0,0.0,0.0
0.0,0.0,0.0,0.0,0.0,0.0,0.0,0.0
0.0,0.0,0.0,0.0,0.0,0.0,0.0,0.0
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0.0,0.0

*Material, name=MATERIAL-GRAIN3
*Depvar
12,
*User Material, constants=250
149.666485060018,80.490793125143,-78.76341715896,3,2,1,12.0,6.0
0.0,0.31,0.25,170000.0,124000.0,75000.0,0.0,0.0
0.0,0.0,0.0,0.0,1.0,0.0,0.0,0.0
3.0,0.001,20.0,0.0,0.0,0.0,0.0,0.0
0.0,0.0,0.0,0.0,0.0,0.0,0.0,0.0
0.0,0.0,0.0,0.0,0.0,0.0,0.0,0.0
0.0,0.0,0.0,0.0,0.0,0.0,0.0,0.0
0.0,0.0,0.0,0.0,0.0,0.0,0.0,0.0
0.0,0.0,0.0,0.0,0.0,0.0,0.0,0.0
0.0,0.0,0.0,0.0,0.0,0.0,0.0,0.0
0.0,0.0,0.0,0.0,0.0,0.0,0.0,0.0
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0.0,0.0

*Material, name=MATERIAL-GRAIN4
*Depvar
12,
*User Material, constants=250
28.103593869267,108.188049525117,-63.61463272824,4,2,1,12.0,6.0
0.0,0.31,0.25,170000.0,124000.0,75000.0,0.0,0.0
0.0,0.0,0.0,0.0,1.0,0.0,0.0,0.0
3.0,0.001,20.0,0.0,0.0,0.0,0.0,0.0
0.0,0.0,0.0,0.0,0.0,0.0,0.0,0.0
0.0,0.0,0.0,0.0,0.0,0.0,0.0,0.0
0.0,0.0,0.0,0.0,0.0,0.0,0.0,0.0
0.0,0.0,0.0,0.0,0.0,0.0,0.0,0.0
0.0,0.0,0.0,0.0,0.0,0.0,0.0,0.0
0.0,0.0,0.0,0.0,0.0,0.0,0.0,0.0
0.0,0.0,0.0,0.0,0.0,0.0,0.0,0.0
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0.0,0.0

*Material, name=MATERIAL-GRAIN5
*Depvar
12,
*User Material, constants=250
98.386281169428,154.399284552252,-108.609685135983,5,2,1,12.0,6.0
0.0,0.31,0.25,170000.0,124000.0,75000.0,0.0,0.0
0.0,0.0,0.0,0.0,1.0,0.0,0.0,0.0
3.0,0.001,20.0,0.0,0.0,0.0,0.0,0.0
0.0,0.0,0.0,0.0,0.0,0.0,0.0,0.0
0.0,0.0,0.0,0.0,0.0,0.0,0.0,0.0
0.0,0.0,0.0,0.0,0.0,0.0,0.0,0.0
0.0,0.0,0.0,0.0,0.0,0.0,0.0,0.0
0.0,0.0,0.0,0.0,0.0,0.0,0.0,0.0
0.0,0.0,0.0,0.0,0.0,0.0,0.0,0.0
0.0,0.0,0.0,0.0,0.0,0.0,0.0,0.0
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0.0,0.0

*Material, name=MATERIAL-GRAIN6
*Depvar
12,
*User Material, constants=250
-127.728653159499,66.694940492113,121.343790041438,6,2,1,12.0,6.0
0.0,0.31,0.25,170000.0,124000.0,75000.0,0.0,0.0
0.0,0.0,0.0,0.0,1.0,0.0,0.0,0.0
3.0,0.001,20.0,0.0,0.0,0.0,0.0,0.0
0.0,0.0,0.0,0.0,0.0,0.0,0.0,0.0
0.0,0.0,0.0,0.0,0.0,0.0,0.0,0.0
0.0,0.0,0.0,0.0,0.0,0.0,0.0,0.0
0.0,0.0,0.0,0.0,0.0,0.0,0.0,0.0
0.0,0.0,0.0,0.0,0.0,0.0,0.0,0.0
0.0,0.0,0.0,0.0,0.0,0.0,0.0,0.0
0.0,0.0,0.0,0.0,0.0,0.0,0.0,0.0
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0.0,0.0

*Material, name=MATERIAL-GRAIN7
*Depvar
12,
*User Material, constants=250
-42.829875342683,109.586938490021,215.743007672898,7,2,1,12.0,6.0
0.0,0.31,0.25,170000.0,124000.0,75000.0,0.0,0.0
0.0,0.0,0.0,0.0,1.0,0.0,0.0,0.0
3.0,0.001,20.0,0.0,0.0,0.0,0.0,0.0
0.0,0.0,0.0,0.0,0.0,0.0,0.0,0.0
0.0,0.0,0.0,0.0,0.0,0.0,0.0,0.0
0.0,0.0,0.0,0.0,0.0,0.0,0.0,0.0
0.0,0.0,0.0,0.0,0.0,0.0,0.0,0.0
0.0,0.0,0.0,0.0,0.0,0.0,0.0,0.0
0.0,0.0,0.0,0.0,0.0,0.0,0.0,0.0
0.0,0.0,0.0,0.0,0.0,0.0,0.0,0.0
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0.0,0.0

*Material, name=MATERIAL-GRAIN8
*Depvar
12,
*User Material, constants=250
53.381759065614,109.734956487707,34.822231697368,8,2,1,12.0,6.0
0.0,0.31,0.25,170000.0,124000.0,75000.0,0.0,0.0
0.0,0.0,0.0,0.0,1.0,0.0,0.0,0.0
3.0,0.001,20.0,0.0,0.0,0.0,0.0,0.0
0.0,0.0,0.0,0.0,0.0,0.0,0.0,0.0
0.0,0.0,0.0,0.0,0.0,0.0,0.0,0.0
0.0,0.0,0.0,0.0,0.0,0.0,0.0,0.0
0.0,0.0,0.0,0.0,0.0,0.0,0.0,0.0
0.0,0.0,0.0,0.0,0.0,0.0,0.0,0.0
0.0,0.0,0.0,0.0,0.0,0.0,0.0,0.0
0.0,0.0,0.0,0.0,0.0,0.0,0.0,0.0
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0.0,0.0

*Material, name=MATERIAL-GRAIN9
*Depvar
12,
*User Material, constants=250
114.11338985323,161.098039982213,-235.163523902386,9,2,1,12.0,6.0
0.0,0.31,0.25,170000.0,124000.0,75000.0,0.0,0.0
0.0,0.0,0.0,0.0,1.0,0.0,0.0,0.0
3.0,0.001,20.0,0.0,0.0,0.0,0.0,0.0
0.0,0.0,0.0,0.0,0.0,0.0,0.0,0.0
0.0,0.0,0.0,0.0,0.0,0.0,0.0,0.0
0.0,0.0,0.0,0.0,0.0,0.0,0.0,0.0
0.0,0.0,0.0,0.0,0.0,0.0,0.0,0.0
0.0,0.0,0.0,0.0,0.0,0.0,0.0,0.0
0.0,0.0,0.0,0.0,0.0,0.0,0.0,0.0
0.0,0.0,0.0,0.0,0.0,0.0,0.0,0.0
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0.0,0.0

*Material, name=MATERIAL-GRAIN10
*Depvar
12,
*User Material, constants=250
23.538811717486,53.801332165171,-0.916204076247,10,2,1,12.0,6.0
0.0,0.31,0.25,170000.0,124000.0,75000.0,0.0,0.0
0.0,0.0,0.0,0.0,1.0,0.0,0.0,0.0
3.0,0.001,20.0,0.0,0.0,0.0,0.0,0.0
0.0,0.0,0.0,0.0,0.0,0.0,0.0,0.0
0.0,0.0,0.0,0.0,0.0,0.0,0.0,0.0
0.0,0.0,0.0,0.0,0.0,0.0,0.0,0.0
0.0,0.0,0.0,0.0,0.0,0.0,0.0,0.0
0.0,0.0,0.0,0.0,0.0,0.0,0.0,0.0
0.0,0.0,0.0,0.0,0.0,0.0,0.0,0.0
0.0,0.0,0.0,0.0,0.0,0.0,0.0,0.0
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0.0,0.0

*Material, name=MATERIAL-GRAIN11
*Depvar
12,
*User Material, constants=250
84.298985473483,47.488808792481,-73.277392141887,11,2,1,12.0,6.0
0.0,0.31,0.25,170000.0,124000.0,75000.0,0.0,0.0
0.0,0.0,0.0,0.0,1.0,0.0,0.0,0.0
3.0,0.001,20.0,0.0,0.0,0.0,0.0,0.0
0.0,0.0,0.0,0.0,0.0,0.0,0.0,0.0
0.0,0.0,0.0,0.0,0.0,0.0,0.0,0.0
0.0,0.0,0.0,0.0,0.0,0.0,0.0,0.0
0.0,0.0,0.0,0.0,0.0,0.0,0.0,0.0
0.0,0.0,0.0,0.0,0.0,0.0,0.0,0.0
0.0,0.0,0.0,0.0,0.0,0.0,0.0,0.0
0.0,0.0,0.0,0.0,0.0,0.0,0.0,0.0
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0.0,0.0

*Material, name=MATERIAL-GRAIN12
*Depvar
12,
*User Material, constants=250
-192.017149057955,124.055171663159,93.434905084249,12,2,1,12.0,6.0
0.0,0.31,0.25,170000.0,124000.0,75000.0,0.0,0.0
0.0,0.0,0.0,0.0,1.0,0.0,0.0,0.0
3.0,0.001,20.0,0.0,0.0,0.0,0.0,0.0
0.0,0.0,0.0,0.0,0.0,0.0,0.0,0.0
0.0,0.0,0.0,0.0,0.0,0.0,0.0,0.0
0.0,0.0,0.0,0.0,0.0,0.0,0.0,0.0
0.0,0.0,0.0,0.0,0.0,0.0,0.0,0.0
0.0,0.0,0.0,0.0,0.0,0.0,0.0,0.0
0.0,0.0,0.0,0.0,0.0,0.0,0.0,0.0
0.0,0.0,0.0,0.0,0.0,0.0,0.0,0.0
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0.0,0.0

*Material, name=MATERIAL-GRAIN13
*Depvar
12,
*User Material, constants=250
197.066134617088,72.051336125742,-131.370789620155,13,2,1,12.0,6.0
0.0,0.31,0.25,170000.0,124000.0,75000.0,0.0,0.0
0.0,0.0,0.0,0.0,1.0,0.0,0.0,0.0
3.0,0.001,20.0,0.0,0.0,0.0,0.0,0.0
0.0,0.0,0.0,0.0,0.0,0.0,0.0,0.0
0.0,0.0,0.0,0.0,0.0,0.0,0.0,0.0
0.0,0.0,0.0,0.0,0.0,0.0,0.0,0.0
0.0,0.0,0.0,0.0,0.0,0.0,0.0,0.0
0.0,0.0,0.0,0.0,0.0,0.0,0.0,0.0
0.0,0.0,0.0,0.0,0.0,0.0,0.0,0.0
0.0,0.0,0.0,0.0,0.0,0.0,0.0,0.0
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0.0,0.0

*Material, name=MATERIAL-GRAIN14
*Depvar
12,
*User Material, constants=250
136.012951354516,60.227157155762,-133.36264289239,14,2,1,12.0,6.0
0.0,0.31,0.25,170000.0,124000.0,75000.0,0.0,0.0
0.0,0.0,0.0,0.0,1.0,0.0,0.0,0.0
3.0,0.001,20.0,0.0,0.0,0.0,0.0,0.0
0.0,0.0,0.0,0.0,0.0,0.0,0.0,0.0
0.0,0.0,0.0,0.0,0.0,0.0,0.0,0.0
0.0,0.0,0.0,0.0,0.0,0.0,0.0,0.0
0.0,0.0,0.0,0.0,0.0,0.0,0.0,0.0
0.0,0.0,0.0,0.0,0.0,0.0,0.0,0.0
0.0,0.0,0.0,0.0,0.0,0.0,0.0,0.0
0.0,0.0,0.0,0.0,0.0,0.0,0.0,0.0
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0.0,0.0

*Material, name=MATERIAL-GRAIN15
*Depvar
12,
*User Material, constants=250
-66.368318801933,77.015756771372,226.312338757127,15,2,1,12.0,6.0
0.0,0.31,0.25,170000.0,124000.0,75000.0,0.0,0.0
0.0,0.0,0.0,0.0,1.0,0.0,0.0,0.0
3.0,0.001,20.0,0.0,0.0,0.0,0.0,0.0
0.0,0.0,0.0,0.0,0.0,0.0,0.0,0.0
0.0,0.0,0.0,0.0,0.0,0.0,0.0,0.0
0.0,0.0,0.0,0.0,0.0,0.0,0.0,0.0
0.0,0.0,0.0,0.0,0.0,0.0,0.0,0.0
0.0,0.0,0.0,0.0,0.0,0.0,0.0,0.0
0.0,0.0,0.0,0.0,0.0,0.0,0.0,0.0
0.0,0.0,0.0,0.0,0.0,0.0,0.0,0.0
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0.0,0.0

*Material, name=MATERIAL-GRAIN16
*Depvar
12,
*User Material, constants=250
-191.94051896777,50.796702171757,101.517830853935,16,2,1,12.0,6.0
0.0,0.31,0.25,170000.0,124000.0,75000.0,0.0,0.0
0.0,0.0,0.0,0.0,1.0,0.0,0.0,0.0
3.0,0.001,20.0,0.0,0.0,0.0,0.0,0.0
0.0,0.0,0.0,0.0,0.0,0.0,0.0,0.0
0.0,0.0,0.0,0.0,0.0,0.0,0.0,0.0
0.0,0.0,0.0,0.0,0.0,0.0,0.0,0.0
0.0,0.0,0.0,0.0,0.0,0.0,0.0,0.0
0.0,0.0,0.0,0.0,0.0,0.0,0.0,0.0
0.0,0.0,0.0,0.0,0.0,0.0,0.0,0.0
0.0,0.0,0.0,0.0,0.0,0.0,0.0,0.0
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0.0,0.0

*Material, name=MATERIAL-GRAIN17
*Depvar
12,
*User Material, constants=250
75.153380401544,93.170797309156,29.227274921214,17,2,1,12.0,6.0
0.0,0.31,0.25,170000.0,124000.0,75000.0,0.0,0.0
0.0,0.0,0.0,0.0,1.0,0.0,0.0,0.0
3.0,0.001,20.0,0.0,0.0,0.0,0.0,0.0
0.0,0.0,0.0,0.0,0.0,0.0,0.0,0.0
0.0,0.0,0.0,0.0,0.0,0.0,0.0,0.0
0.0,0.0,0.0,0.0,0.0,0.0,0.0,0.0
0.0,0.0,0.0,0.0,0.0,0.0,0.0,0.0
0.0,0.0,0.0,0.0,0.0,0.0,0.0,0.0
0.0,0.0,0.0,0.0,0.0,0.0,0.0,0.0
0.0,0.0,0.0,0.0,0.0,0.0,0.0,0.0
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0.0,0.0

*Material, name=MATERIAL-GRAIN18
*Depvar
12,
*User Material, constants=250
-87.958184371423,171.41717267159,256.945025063894,18,2,1,12.0,6.0
0.0,0.31,0.25,170000.0,124000.0,75000.0,0.0,0.0
0.0,0.0,0.0,0.0,1.0,0.0,0.0,0.0
3.0,0.001,20.0,0.0,0.0,0.0,0.0,0.0
0.0,0.0,0.0,0.0,0.0,0.0,0.0,0.0
0.0,0.0,0.0,0.0,0.0,0.0,0.0,0.0
0.0,0.0,0.0,0.0,0.0,0.0,0.0,0.0
0.0,0.0,0.0,0.0,0.0,0.0,0.0,0.0
0.0,0.0,0.0,0.0,0.0,0.0,0.0,0.0
0.0,0.0,0.0,0.0,0.0,0.0,0.0,0.0
0.0,0.0,0.0,0.0,0.0,0.0,0.0,0.0
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0.0,0.0

*Material, name=MATERIAL-GRAIN19
*Depvar
12,
*User Material, constants=250
122.553013957309,125.523877993174,-178.193534462708,19,2,1,12.0,6.0
0.0,0.31,0.25,170000.0,124000.0,75000.0,0.0,0.0
0.0,0.0,0.0,0.0,1.0,0.0,0.0,0.0
3.0,0.001,20.0,0.0,0.0,0.0,0.0,0.0
0.0,0.0,0.0,0.0,0.0,0.0,0.0,0.0
0.0,0.0,0.0,0.0,0.0,0.0,0.0,0.0
0.0,0.0,0.0,0.0,0.0,0.0,0.0,0.0
0.0,0.0,0.0,0.0,0.0,0.0,0.0,0.0
0.0,0.0,0.0,0.0,0.0,0.0,0.0,0.0
0.0,0.0,0.0,0.0,0.0,0.0,0.0,0.0
0.0,0.0,0.0,0.0,0.0,0.0,0.0,0.0
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0.0,0.0

*Material, name=MATERIAL-GRAIN20
*Depvar
12,
*User Material, constants=250
-109.3601233701,154.39365560155,175.311898871809,20,2,1,12.0,6.0
0.0,0.31,0.25,170000.0,124000.0,75000.0,0.0,0.0
0.0,0.0,0.0,0.0,1.0,0.0,0.0,0.0
3.0,0.001,20.0,0.0,0.0,0.0,0.0,0.0
0.0,0.0,0.0,0.0,0.0,0.0,0.0,0.0
0.0,0.0,0.0,0.0,0.0,0.0,0.0,0.0
0.0,0.0,0.0,0.0,0.0,0.0,0.0,0.0
0.0,0.0,0.0,0.0,0.0,0.0,0.0,0.0
0.0,0.0,0.0,0.0,0.0,0.0,0.0,0.0
0.0,0.0,0.0,0.0,0.0,0.0,0.0,0.0
0.0,0.0,0.0,0.0,0.0,0.0,0.0,0.0
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0.0,0.0

*Material, name=MATERIAL-GRAIN21
*Depvar
12,
*User Material, constants=250
108.361642846414,174.633000297541,-180.456141300315,21,2,1,12.0,6.0
0.0,0.31,0.25,170000.0,124000.0,75000.0,0.0,0.0
0.0,0.0,0.0,0.0,1.0,0.0,0.0,0.0
3.0,0.001,20.0,0.0,0.0,0.0,0.0,0.0
0.0,0.0,0.0,0.0,0.0,0.0,0.0,0.0
0.0,0.0,0.0,0.0,0.0,0.0,0.0,0.0
0.0,0.0,0.0,0.0,0.0,0.0,0.0,0.0
0.0,0.0,0.0,0.0,0.0,0.0,0.0,0.0
0.0,0.0,0.0,0.0,0.0,0.0,0.0,0.0
0.0,0.0,0.0,0.0,0.0,0.0,0.0,0.0
0.0,0.0,0.0,0.0,0.0,0.0,0.0,0.0
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0.0,0.0

*Material, name=MATERIAL-GRAIN22
*Depvar
12,
*User Material, constants=250
85.654904574316,113.848541941196,63.692366833359,22,2,1,12.0,6.0
0.0,0.31,0.25,170000.0,124000.0,75000.0,0.0,0.0
0.0,0.0,0.0,0.0,1.0,0.0,0.0,0.0
3.0,0.001,20.0,0.0,0.0,0.0,0.0,0.0
0.0,0.0,0.0,0.0,0.0,0.0,0.0,0.0
0.0,0.0,0.0,0.0,0.0,0.0,0.0,0.0
0.0,0.0,0.0,0.0,0.0,0.0,0.0,0.0
0.0,0.0,0.0,0.0,0.0,0.0,0.0,0.0
0.0,0.0,0.0,0.0,0.0,0.0,0.0,0.0
0.0,0.0,0.0,0.0,0.0,0.0,0.0,0.0
0.0,0.0,0.0,0.0,0.0,0.0,0.0,0.0
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0.0,0.0

*Material, name=MATERIAL-GRAIN23
*Depvar
12,
*User Material, constants=250
51.086981568325,176.27114563009,65.319886933039,23,2,1,12.0,6.0
0.0,0.31,0.25,170000.0,124000.0,75000.0,0.0,0.0
0.0,0.0,0.0,0.0,1.0,0.0,0.0,0.0
3.0,0.001,20.0,0.0,0.0,0.0,0.0,0.0
0.0,0.0,0.0,0.0,0.0,0.0,0.0,0.0
0.0,0.0,0.0,0.0,0.0,0.0,0.0,0.0
0.0,0.0,0.0,0.0,0.0,0.0,0.0,0.0
0.0,0.0,0.0,0.0,0.0,0.0,0.0,0.0
0.0,0.0,0.0,0.0,0.0,0.0,0.0,0.0
0.0,0.0,0.0,0.0,0.0,0.0,0.0,0.0
0.0,0.0,0.0,0.0,0.0,0.0,0.0,0.0
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0.0,0.0

*Material, name=MATERIAL-GRAIN24
*Depvar
12,
*User Material, constants=250
-15.112847574638,97.96926686476,-13.71625185495,24,2,1,12.0,6.0
0.0,0.31,0.25,170000.0,124000.0,75000.0,0.0,0.0
0.0,0.0,0.0,0.0,1.0,0.0,0.0,0.0
3.0,0.001,20.0,0.0,0.0,0.0,0.0,0.0
0.0,0.0,0.0,0.0,0.0,0.0,0.0,0.0
0.0,0.0,0.0,0.0,0.0,0.0,0.0,0.0
0.0,0.0,0.0,0.0,0.0,0.0,0.0,0.0
0.0,0.0,0.0,0.0,0.0,0.0,0.0,0.0
0.0,0.0,0.0,0.0,0.0,0.0,0.0,0.0
0.0,0.0,0.0,0.0,0.0,0.0,0.0,0.0
0.0,0.0,0.0,0.0,0.0,0.0,0.0,0.0
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0.0,0.0

*Material, name=MATERIAL-GRAIN25
*Depvar
12,
*User Material, constants=250
-159.68425757001,78.866493657304,4.407036690384,25,2,1,12.0,6.0
0.0,0.31,0.25,170000.0,124000.0,75000.0,0.0,0.0
0.0,0.0,0.0,0.0,1.0,0.0,0.0,0.0
3.0,0.001,20.0,0.0,0.0,0.0,0.0,0.0
0.0,0.0,0.0,0.0,0.0,0.0,0.0,0.0
0.0,0.0,0.0,0.0,0.0,0.0,0.0,0.0
0.0,0.0,0.0,0.0,0.0,0.0,0.0,0.0
0.0,0.0,0.0,0.0,0.0,0.0,0.0,0.0
0.0,0.0,0.0,0.0,0.0,0.0,0.0,0.0
0.0,0.0,0.0,0.0,0.0,0.0,0.0,0.0
0.0,0.0,0.0,0.0,0.0,0.0,0.0,0.0
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0.0,0.0

*Material, name=MATERIAL-GRAIN26
*Depvar
12,
*User Material, constants=250
7.019593276894,84.946509840618,142.052426540842,26,2,1,12.0,6.0
0.0,0.31,0.25,170000.0,124000.0,75000.0,0.0,0.0
0.0,0.0,0.0,0.0,1.0,0.0,0.0,0.0
3.0,0.001,20.0,0.0,0.0,0.0,0.0,0.0
0.0,0.0,0.0,0.0,0.0,0.0,0.0,0.0
0.0,0.0,0.0,0.0,0.0,0.0,0.0,0.0
0.0,0.0,0.0,0.0,0.0,0.0,0.0,0.0
0.0,0.0,0.0,0.0,0.0,0.0,0.0,0.0
0.0,0.0,0.0,0.0,0.0,0.0,0.0,0.0
0.0,0.0,0.0,0.0,0.0,0.0,0.0,0.0
0.0,0.0,0.0,0.0,0.0,0.0,0.0,0.0
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0.0,0.0

*Material, name=MATERIAL-GRAIN27
*Depvar
12,
*User Material, constants=250
160.038060491016,142.675584772224,-45.485315354824,27,2,1,12.0,6.0
0.0,0.31,0.25,170000.0,124000.0,75000.0,0.0,0.0
0.0,0.0,0.0,0.0,1.0,0.0,0.0,0.0
3.0,0.001,20.0,0.0,0.0,0.0,0.0,0.0
0.0,0.0,0.0,0.0,0.0,0.0,0.0,0.0
0.0,0.0,0.0,0.0,0.0,0.0,0.0,0.0
0.0,0.0,0.0,0.0,0.0,0.0,0.0,0.0
0.0,0.0,0.0,0.0,0.0,0.0,0.0,0.0
0.0,0.0,0.0,0.0,0.0,0.0,0.0,0.0
0.0,0.0,0.0,0.0,0.0,0.0,0.0,0.0
0.0,0.0,0.0,0.0,0.0,0.0,0.0,0.0
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0.0,0.0

*Material, name=MATERIAL-GRAIN28
*Depvar
12,
*User Material, constants=250
59.994530707472,131.491225651469,51.137505199678,28,2,1,12.0,6.0
0.0,0.31,0.25,170000.0,124000.0,75000.0,0.0,0.0
0.0,0.0,0.0,0.0,1.0,0.0,0.0,0.0
3.0,0.001,20.0,0.0,0.0,0.0,0.0,0.0
0.0,0.0,0.0,0.0,0.0,0.0,0.0,0.0
0.0,0.0,0.0,0.0,0.0,0.0,0.0,0.0
0.0,0.0,0.0,0.0,0.0,0.0,0.0,0.0
0.0,0.0,0.0,0.0,0.0,0.0,0.0,0.0
0.0,0.0,0.0,0.0,0.0,0.0,0.0,0.0
0.0,0.0,0.0,0.0,0.0,0.0,0.0,0.0
0.0,0.0,0.0,0.0,0.0,0.0,0.0,0.0
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0.0,0.0

*Material, name=MATERIAL-GRAIN29
*Depvar
12,
*User Material, constants=250
216.40377207038,111.028012174383,-114.851920779452,29,2,1,12.0,6.0
0.0,0.31,0.25,170000.0,124000.0,75000.0,0.0,0.0
0.0,0.0,0.0,0.0,1.0,0.0,0.0,0.0
3.0,0.001,20.0,0.0,0.0,0.0,0.0,0.0
0.0,0.0,0.0,0.0,0.0,0.0,0.0,0.0
0.0,0.0,0.0,0.0,0.0,0.0,0.0,0.0
0.0,0.0,0.0,0.0,0.0,0.0,0.0,0.0
0.0,0.0,0.0,0.0,0.0,0.0,0.0,0.0
0.0,0.0,0.0,0.0,0.0,0.0,0.0,0.0
0.0,0.0,0.0,0.0,0.0,0.0,0.0,0.0
0.0,0.0,0.0,0.0,0.0,0.0,0.0,0.0
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0.0,0.0

*Material, name=MATERIAL-GRAIN30
*Depvar
12,
*User Material, constants=250
-108.907848896538,65.498221245978,106.73513195384,30,2,1,12.0,6.0
0.0,0.31,0.25,170000.0,124000.0,75000.0,0.0,0.0
0.0,0.0,0.0,0.0,1.0,0.0,0.0,0.0
3.0,0.001,20.0,0.0,0.0,0.0,0.0,0.0
0.0,0.0,0.0,0.0,0.0,0.0,0.0,0.0
0.0,0.0,0.0,0.0,0.0,0.0,0.0,0.0
0.0,0.0,0.0,0.0,0.0,0.0,0.0,0.0
0.0,0.0,0.0,0.0,0.0,0.0,0.0,0.0
0.0,0.0,0.0,0.0,0.0,0.0,0.0,0.0
0.0,0.0,0.0,0.0,0.0,0.0,0.0,0.0
0.0,0.0,0.0,0.0,0.0,0.0,0.0,0.0
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0.0,0.0

**
**
** STEP: Loading
**
*Step, name=Loading, nlgeom=YES, inc=10000
*Static
0.01, 10., 1e-05, 1.
**
** OUTPUT REQUESTS
**
*Restart, write, frequency=0
**
** FIELD OUTPUT: F-Output-1
**
*Output, field, variable=PRESELECT
**
** FIELD OUTPUT: F-Output-2
**
*Element Output, directions=YES
SDV,
**
** HISTORY OUTPUT: H-Output-1
**
*Output, history, variable=PRESELECT
**
*End Step
