*Heading
 compression
** Job name: Job-1 Model name: Model-1
** Generated by: Abaqus/CAE 6.14-5
*Preprint, echo=NO, model=NO, history=NO, contact=NO
**
** PARTS
**
*Part, name=Part-1
*Node
      1,          10.,          10.,          10.
      2,          10.,           8.,          10.
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*Element, type=C3D8
  1,  37,  38,  44,  43,   1,   2,   8,   7
  2,  38,  39,  45,  44,   2,   3,   9,   8
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*Nset, nset=Set-1, generate
   1,  216,    1
*Elset, elset=Set-1, generate
   1,  125,    1
** Section: Section-1
*Solid Section, elset=Set-1, material=CPuranium
,
*End Part
**
**
** ASSEMBLY
**
*Assembly, name=Assembly
**
*Instance, name=Part-1-1, part=Part-1
*End Instance
**
*Nset, nset=Set-1, instance=Part-1-1, generate
   6,  216,    6
*Elset, elset=Set-1, instance=Part-1-1, generate
   5,  125,    5
*Nset, nset=Set-2, instance=Part-1-1, generate
 181,  216,    1
*Elset, elset=Set-2, instance=Part-1-1, generate
 101,  125,    1
*Nset, nset=Set-3, instance=Part-1-1
  31,  32,  33,  34,  35,  36
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*Elset, elset=Set-3, instance=Part-1-1
  21,  22,  23,  24,  25,  46
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*Nset, nset=Set-4, instance=Part-1-1
   1,   2,   3,   4,   5,   6
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*Elset, elset=Set-4, instance=Part-1-1
   1,   2,   3,   4,   5,  26
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*End Assembly
*Amplitude, name=Amp-1
             0.,              0.,            100.,              1.
**
** MATERIALS
**
** alpha-Uranium material model
*Material, name=CPuranium
*Depvar
    125,
*User Material, constants=11
0.,0.89931,-0.4373,0.,0.26422,0.54336,-0.79684,0.34846
0.71661,0.6042,1.
** ----------------------------------------------------------------
**
** STEP: Step-1
**
*Step, name=Step-1, nlgeom=YES, inc=100000
compression
*Static
0.01, 100., 0.00001, 0.01
**
** BOUNDARY CONDITIONS
**
** Name: Xsymmetry Type: Symmetry/Antisymmetry/Encastre
*Boundary
Set-2, XSYMM
** Name: Ysymmetry Type: Symmetry/Antisymmetry/Encastre
*Boundary
Set-1, YSYMM
** Name: Zcompression Type: Displacement/Rotation
*Boundary, amplitude=Amp-1
Set-4, 3, 3, 1.
** Name: Zsymmetry Type: Symmetry/Antisymmetry/Encastre
*Boundary
Set-3, ZSYMM
**
** OUTPUT REQUESTS
**
*Restart, write, frequency=0
**
** FIELD OUTPUT: F-Output-1
**
*Output, field, frequency=200
*Node Output
U,
*Element Output, directions=YES
S, SDV99, SDV100, SDV101
*Output, history, frequency=0
*End Step
