*Heading
** Job name: Job-1 Model name: Model-1
** Generated by: Abaqus/CAE Unofficial Packaging Version
*Preprint, echo=NO, model=NO, history=NO, contact=NO
**
** PARTS
**
*Part, name=Part-1
*Node
      1,         19.5,           0.,           0.
      2,          19.,           0.,           0.
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*Element, type=C3D8
   1,  6608,  1825,     1,  1502, 14804, 10021,  8197,  9698
   2,   152,  1670,  6608,  1669,  8348,  9866, 14804,  9865
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*Nset, nset=GRAIN1, generate
     1,  16392,      1
*Elset, elset=GRAIN1, generate
    1,  8035,     1
** Section: GRAIN1
*Solid Section, elset=GRAIN1, material=GRAIN1
,
*End Part
**
**
** ASSEMBLY
**
*Assembly, name=Assembly
**
*Instance, name=Part-1-1, part=Part-1
*End Instance
**
*Nset, nset=X0, instance=Part-1-1
   39,   40,   41,   42,   43,   44
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*Elset, elset=X0, instance=Part-1-1
 1395, 1407, 1424, 1429, 1463, 1490
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*Nset, nset=Xmax, instance=Part-1-1
   38,  115,  116,  117,  118,  119
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*Elset, elset=Xmax, instance=Part-1-1
    2,    3,    4,    5,    6,    7
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*Nset, nset=Y0, instance=Part-1-1
    1,    2,    3,    4,    5,    6
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*Elset, elset=Y0, instance=Part-1-1
    1,   40,   78,  115,  153,  188
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*Nset, nset=Z0, instance=Part-1-1, generate
    1,  8196,     1
*Elset, elset=Z0, instance=Part-1-1, generate
    1,  8035,     1
*End Assembly
*Amplitude, name=Amp-1
             0.,              0.,            300.,              6.
**
** MATERIALS
**
*Material, name=GRAIN1
*Depvar
    125,
*User Material, constants=11
5.,  0.983, -0.183,     0.,  0.183,  0.983,     0.,     0.
     0.,     1.,     1.
*Time Points, name=TimePoints-1, GENERATE
0., 300., 10.0
** ----------------------------------------------------------------
**
** STEP: Tension
**
*Step, name=Tension, nlgeom=YES, inc=100000
*Static
0.05, 300.0, 1e-20, 0.05
**
** BOUNDARY CONDITIONS
**
** Name: X0 Type: Displacement/Rotation
*Boundary
X0, 1, 1
** Name: Xmax Type: Displacement/Rotation
*Boundary, amplitude=Amp-1
Xmax, 1, 1, 1.
** Name: Y0 Type: Displacement/Rotation
*Boundary
Y0, 2, 2
** Name: Z0 Type: Displacement/Rotation
*Boundary
Z0, 3, 3
**
** OUTPUT REQUESTS
**
*Restart, write, frequency=0
**
** FIELD OUTPUT: F-Output-1
**
*Output, field, time points=TimePoints-1, time marks=NO
*Node Output
U,
*Element Output, directions=YES
S, SDV107, SDV108, SDV125, SDV94, SDV95,
SDV96, SDV97, SDV113, SDV114
*Output, history, frequency=0
*End Step
